μH ≡ 10^-6*H
μs ≡ 10^-6*s
# DESIGN OF A LOW-PASS SC FILTER WITH CHEBYSCHEV APPROXIMATION
# 1) LC prototype
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f_c := 20*kHz
# 2nd-order
# 1dB ripple
# 1kHz cut-off frequency
R := 1*Ω
L := 7.249*μH
C := 7.923*μF
τ_1 := L/R
τ_1 = 7.249 μs
τ_2 := R*C
τ_2 = 7.923 μs
b_0 := 1
b_0 = 1
b_1 := τ_2
b_1 = 7.923e-6 s
b_2 := τ_1*τ_2
b_2 = 5.74338e-11 s^2
H(s) := 1/(b_2*s^2 + b_1*s + b_0)
H_LC(f) := H(1j*2*π*f)
HLC_dB(f) := 20*log(|H_LC(f)|)
HLC_dB(0*Hz) = 0
f := 1*kHz, 2*kHz .. 1*MHz
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f := 1*kHz, 1.1*kHz .. 100*kHz
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# 2) Corresponding SCF
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f_s := 2 MHz
T := 1/f_s
T = 0.5 μs
α_1 := 1/(f_s*τ_1)
α_1 = 0.068975
α_2 := 1/(f_s*τ_2)
α_2 = 0.0631074
# 3) Analysis
# Detailed analysis gives the following z transfer function:
a_1 := α_1*α_2
a_1 = 0.00435284
b_0 := 1
b_0 = 1
b_1 := α_1*α_2 - α_1 - 2
b_1 = -2.06462
b_2 := α_1 + 1
b_2 = 1.06898
H(z) := a_1*z/(b_2*z^2 + b_1*z + b_0)
H_SC(f) := H(e^(1j*2*π*f*T))
HSC_dB(f) := 20*log(|H_SC(f)|)
f := 1*kHz, 2*kHz .. 1*MHz
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f := 1*kHz, 2*kHz .. 100*kHz
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# 4) Comparison with Switcap simulations
# [component: outputs Hsw]
# [component: outputs freq]
N := rows(freq)
N =  # error: This variable is undefined.
n := 0 .. N - 1
f[n] := freq[n]*Hz
HSCsw[n] := Hsw[n]
HLC[n] := HLC_dB(f[n])
HSCth[n] := HSC_dB(f[n])
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