μH ≡ 10^-6*H
μs ≡ 10^-6*s
mF ≡ 10^-3*F
# DESIGN OF A LOW-PASS SC FILTER WITH CHEBYSCHEV APPROXIMATION
# 1) LC prototype
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f_c := 20*kHz
# 3rd-order
# 1dB ripple
# 1kHz cut-off frequency
R_1 := 1*Ω
C_1 := 15.19*μF
L_2 := 7.196*μH
C_2 := 1.157*μF
C_3 := 15.19*μF
R_3 := 1*Ω
C´_1 := C_1 + C_2
C´_3 := C_3 + C_2
τ_1 := R_1*C´_1
τ_1 = 16.347 μs
τ_2 := L_2/R_1
τ_2 = 7.196 μs
τ_3 := R_1*C´_3
τ_3 = 16.347 μs
c_1 := C_2/C´_1
c_3 := C_2/C´_3
r := R_1/R_3
a_0 := 2
a_2 := 2*c_3*τ_2*τ_3
b_0 := 1 + r
b_0 = 2
b_1 := (1 - c_1)*τ_1 + r*τ_2 + (1 - c_3)*τ_3
b_1 = 3.7576e-5 s
b_2 := τ_2*(r*τ_1 + τ_3)
b_2 = 2.35266e-10 s^2
b_3 := (1 - c_1*c_3)*τ_1*τ_2*τ_3
b_3 = 1.91331e-15 s^3
H(s) := (a_0 + a_2*s^2)/(b_3*s^3 + b_2*s^2 + b_1*s + b_0)
H_LC(f) := H(1j*2*π*f)
HLC_dB(f) := 20*log(|H_LC(f)|)
HLC_dB(0*Hz) = 0
f := 1*kHz, 2*kHz .. 10^6*Hz
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f := 1*kHz, 2*kHz .. 100*kHz
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# 2) Corresponding SCF
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f_s := 2 MHz
T := 1/f_s
T = 0.5 μs
α_11 := 1/(f_s*τ_1)
α_11 = 0.0305867
α_12 := α_11
α_12 = 0.0305867
α_13 := 2*α_11
α_13 = 0.0611733
α_21 := 1/(f_s*τ_2)
α_21 = 0.069483
α_22 := α_21
α_22 = 0.069483
α_31 := 1/(f_s*τ_3)
α_31 = 0.0305867
α_32 := r*α_31
α_32 = 0.0305867
β_1 := C_2/C´_1
β_1 = 0.0707775
β_3 := C_2/C´_3
β_3 = 0.0707775
# 3) Analysis
# Detailed analysis gives the following z transfer function:
a_0 := 0
a_0 = 0
a_1 := α_13*β_3
a_1 = 0.00432969
a_2 := α_13*(α_21*α_31 - 2*β_3)
a_2 = -0.00852938
a_3 := α_13*β_3
a_3 = 0.00432969
b_0 := 1 - β_1*β_3
b_0 = 0.994991
b_1 := -3 - α_12 + α_11*α_21 + α_22*α_31 - α_32 - α_21*α_31*β_1 - α_11*α_22*β_3 + 3*β_1*β_3
b_1 = -3.0422
b_2 := 3 + 2*α_12 - α_11*α_21 - α_22*α_31 - α_12*α_22*α_31 + 2*α_32 + α_12*α_32 - α_11*α_21*α_32 + α_21*α_31*β_1 + α_11*α_22*β_3 - 3*β_1*β_3
b_2 = 3.10417
b_3 := -1 - α_12 - α_32 - α_12*α_32 + β_1*β_3
b_3 = -1.0571
H(z) := (a_3*z^3 + a_2*z^2 + a_1*z + a_0)/(b_3*z^3 + b_2*z^2 + b_1*z + b_0)
H_SC(f) := H(e^(1j*2*π*f*T))
HSC_dB(f) := 20*log(|H_SC(f)|)
f := 1*kHz, 2*kHz .. 1*MHz
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f := 0*Hz, 10*Hz .. 1.1*10^3*Hz
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# 5) Scaling for maximum dynamic range
# [component: outputs HdB13]
# [component: outputs HdB5]
# [component: outputs HdB9]
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HdB5max := max(HdB5)
HdB5max =  # error: This variable is undefined.
HdB9max := max(HdB9)
HdB9max =  # error
k_1 := 10^(HdB5max/20)
k_1 =  # error
k_2 := 10^(HdB9max/20)
k_2 =  # error
C_1 := k_1
C_1 =  # error
C_11 := α_11*k_2
C_11 =  # error
C_12 := α_12*k_1
C_12 =  # error
C_13 := α_13
C_13 = 0.0611733
C_14 := β_1
C_14 = 0.0707775
C_2 := k_2
C_2 =  # error
C_21 := α_21*k_1
C_21 =  # error
C_22 := α_22
C_22 = 0.069483
C_3 := 1
C_3 = 1
C_31 := α_31*k_2
C_31 =  # error
C_32 := α_32
C_32 = 0.0305867
C_33 := β_3*k_1
C_33 =  # error
# [component: outputs HdB13]
# [component: outputs HdB5]
# [component: outputs HdB9]
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